// SBML level 2 version 4

function Function_for_v_0(BaF3_Epo, STAT5A, k_phos)
  BaF3_Epo*STAT5A^2*k_phos;
end

function Function_for_v_1(BaF3_Epo, STAT5A, STAT5B, k_phos)
  BaF3_Epo*STAT5A*STAT5B*k_phos;
end

function Function_for_v_2(BaF3_Epo, STAT5B, k_phos)
  BaF3_Epo*STAT5B^2*k_phos;
end

function Function_for_v_3(cyt, k_imp_homo, pApA)
  cyt*k_imp_homo*pApA;
end

function Function_for_v_4(cyt, k_imp_hetero, pApB)
  cyt*k_imp_hetero*pApB;
end

function Function_for_v_5(cyt, k_imp_homo, pBpB)
  cyt*k_imp_homo*pBpB;
end

function Function_for_v_6(k_exp_homo, nuc, nucpApA)
  nuc*k_exp_homo*nucpApA;
end

function Function_for_v_7(k_exp_hetero, nuc, nucpApB)
  nuc*k_exp_hetero*nucpApB;
end

function Function_for_v_8(k_exp_homo, nuc, nucpBpB)
  nuc*k_exp_homo*nucpBpB;
end

model FullModel()
  // NoName

  // Compartments:
  compartment cyt = 1.4;
  compartment nuc = 0.45;

  // Species:
  species STAT5A in cyt = 207.6*ratio;
  species STAT5B in cyt = 207.6 - 207.6*ratio;
  species pApB in cyt = 0;
  species pApA in cyt = 0;
  species pBpB in cyt = 0;
  species nucpApA in nuc = 0;
  species nucpApB in nuc = 0;
  species nucpBpB in nuc = 0;
  species $pSTAT5A_relO in cyt;
  species $pSTAT5B_relO in cyt;
  species $rSTAT5A_relO in cyt;

  // Parameters:
  Epo_degradation_BaF3 = 0.02883601;
  k_exp_hetero = 9.594873e-5;
  k_exp_homo = 0.005042236;
  k_imp_hetero = 0.01609931;
  k_imp_homo = 192.1783;
  k_phos = 16679.37;
  ratio = 0.693;
  sd_pSTAT5A_rel = 0.04959103;
  sd_pSTAT5B_rel = 3.914232;
  sd_rSTAT5A_rel = 0.02198414;
  specC17 = 0.107;

  // Assignment rules:
  pSTAT5A_rel := (100*pApB + 200*pApA*specC17)/(pApB + STAT5A*specC17 + 2*pApA*specC17);
  pSTAT5A_relO := pSTAT5A_rel;
  pSTAT5B_rel := -(100*pApB - 200*pBpB*(specC17 - 1))/(STAT5B*(specC17 - 1) - pApB + 2*pBpB*(specC17 - 1));
  pSTAT5B_relO := pSTAT5B_rel;
  rSTAT5A_rel := (100*pApB + 100*STAT5A*specC17 + 200*pApA*specC17)/(2*pApB + STAT5A*specC17 + 2*pApA*specC17 - STAT5B*(specC17 - 1) - 2*pBpB*(specC17 - 1));
  rSTAT5A_relO := rSTAT5A_rel;
  BaF3_Epo := 1.25e-7*exp(-Epo_degradation_BaF3*time);

  // Reactions:
  v1_v_0: 2 STAT5A => pApA; cyt*Function_for_v_0(BaF3_Epo, STAT5A, k_phos);
  v2_v_1: STAT5A + STAT5B => pApB; cyt*Function_for_v_1(BaF3_Epo, STAT5A, STAT5B, k_phos);
  v3_v_2: 2 STAT5B => pBpB; cyt*Function_for_v_2(BaF3_Epo, STAT5B, k_phos);
  v4_v_3: pApA => nucpApA; Function_for_v_3(cyt, k_imp_homo, pApA);
  v5_v_4: pApB => nucpApB; Function_for_v_4(cyt, k_imp_hetero, pApB);
  v6_v_5: pBpB => nucpBpB; Function_for_v_5(cyt, k_imp_homo, pBpB);
  v7_v_6: nucpApA => 2 STAT5A; Function_for_v_6(k_exp_homo, nuc, nucpApA);
  v8_v_7: nucpApB => STAT5A + STAT5B; Function_for_v_7(k_exp_hetero, nuc, nucpApB);
  v9_v_8: nucpBpB => 2 STAT5B; Function_for_v_8(k_exp_homo, nuc, nucpBpB);

  // Unit definitions:
  unit time = 60 second;
end
