// SBML level 2 version 4

function Function_for_v_0(IR, insulin, k1a, k1aBasic)
  IR*k1aBasic + IR*insulin*k1a;
end

function Function_for_v_4(IRiP, XXp, k1e, k1f)
  IRiP*(k1e + XXp*k1f/(XXp + 1));
end

function Function_for_v_7(IRS, IRiP, IRp, k21, k22)
  IRS*k21*(IRp + IRiP*k22);
end

function Function_for_v_9(IRSiP, XX, k3)
  IRSiP*XX*k3;
end

model model_Mif()
  // NoName

  // Compartments:
  compartment cyt = 1;

  // Species:
  species IR in cyt = 9.949576;
  species IRins in cyt = 0.01739722;
  species IRp in cyt = 1.762901e-9;
  species IRiP in cyt = 1.1159e-5;
  species IRi in cyt = 0.03301519;
  species IRS in cyt = 9.866993;
  species IRSiP in cyt = 0.1330065;
  species XX in cyt = 9.999842;
  species XXp in cyt = 0.0001580051;
  species $IR1_PO in cyt;
  species $IRS1_PO in cyt;

  // Parameters:
  k1a = 0.2449837;
  k1aBasic = 0.03744216;
  k1b = 0.0005996497;
  k1c = 0.28395;
  k1d = 391.2912;
  k1e = 0.8983877;
  k1f = 144.7326;
  k1g = 2.04751e-6;
  k1r = 0.6265705;
  k21 = 15.15199;
  k22 = 0.2032835;
  k3 = 0.04640311;
  k_IRP_1Step = 2068.278;
  k_IRSiP_1Step = 127.5122;
  km2 = 1.520828;
  km3 = 0.0002281854;
  sigmaY1TimR = 30.60387;
  sigmaY2TimR = 0.0006239246;

  // Assignment rules:
  IR1_P := k_IRP_1Step*(IRiP + IRp);
  IR1_PO := IR1_P;
  IRS1_P := IRSiP*k_IRSiP_1Step;
  IRS1_PO := IRS1_P;
  insulin := 100*piecewise(0, time < 0, 1);

  // Reactions:
  v1_v_0: IR => IRins; cyt*Function_for_v_0(IR, insulin, k1a, k1aBasic);
  v2_v_1: IRins => IR; cyt*k1b*IRins;
  v3_v_2: IRins => IRp; cyt*k1c*IRins;
  v4_v_3: IRp => IRiP; cyt*k1d*IRp;
  v5_v_4: IRiP => IRi; cyt*Function_for_v_4(IRiP, XXp, k1e, k1f);  // modifiers: XXp
  v6_v_5: IRp => IR; cyt*k1g*IRp;
  v7_v_6: IRi => IR; cyt*k1r*IRi;
  v8_v_7: IRS => IRSiP; cyt*Function_for_v_7(IRS, IRiP, IRp, k21, k22);  // modifiers: IRiP, IRp
  v9_v_8: IRSiP => IRS; cyt*km2*IRSiP;
  v10_v_9: XX => XXp; cyt*Function_for_v_9(IRSiP, XX, k3);  // modifiers: IRSiP
  v11_v_10: XXp => XX; cyt*km3*XXp;

  // Unit definitions:
  unit time = 60 second;
end
