// SBML level 3 version 1
// dcterms:bibliographicCitation: http://identifiers.org/pubmed/25053556

function Function_R8_revised(alt, t, stimtime, default_compartment)
  alt*piecewise(sin(t*pi/stimtime)^2, t < stimtime, 0)/default_compartment;
end

function Function_for_R10(c, default_compartment)
  c/default_compartment;
end

function Function_for_R6(c, default_compartment)
  c/default_compartment;
end

function Function_for_R1(c, default_compartment)
  c/default_compartment;
end

function Function_for_R2_1(default_compartment, n, vt)
  vt*n/default_compartment;
end

function Function_for_R3_1(default_compartment, n, vt)
  vt*n/default_compartment;
end

function Function_for_R4_1(Gat, a, default_compartment)
  Gat*a/default_compartment;
end

function Function_for_R5_1(Tt, a, default_compartment, m)
  Tt*m*a/default_compartment;
end

function Function_for_R7_1(Gmt, default_compartment, m)
  Gmt*m/default_compartment;
end

function Function_for_R9_1(Bat, Gat, a, default_compartment)
  Gat*(a^2/(Bat^2 + a^2))/default_compartment;
end

model MODEL1608160000()
  // Dunster2014 - WBC Interactions (Model1)
  // This is a sub-model of a three-step inflammatory response modelling study. The model includes distinct populations of white blood cells namely, macrophages and active and apoptotic neutrophil populations. Neutrophil apoptosis rate is predicted to be crucial for the qualitative nature of the system.
  // This model is described in the article:
  // The resolution of inflammation: a mathematical model of neutrophil and macrophage interactions.
  // Dunster JL, Byrne HM, King JR.
  // Bull. Math. Biol. 2014 Aug; 76(8): 1953-1980
  // Abstract:
  // There is growing interest in inflammation due to its involvement in many diverse medical conditions, including Alzheimer's disease, cancer, arthritis and asthma. The traditional view that resolution of inflammation is a passive process is now being superceded by an alternative hypothesis whereby its resolution is an active, anti-inflammatory process that can be manipulated therapeutically. This shift in mindset has stimulated a resurgence of interest in the biological mechanisms by which inflammation resolves. The anti-inflammatory processes central to the resolution of inflammation revolve around macrophages and are closely related to pro-inflammatory processes mediated by neutrophils and their ability to damage healthy tissue. We develop a spatially averaged model of inflammation centring on its resolution, accounting for populations of neutrophils and macrophages and incorporating both pro- and anti-inflammatory processes. Our ordinary differential equation model exhibits two outcomes that we relate to healthy and unhealthy states. We use bifurcation analysis to investigate how variation in the system parameters affects its outcome. We find that therapeutic manipulation of the rate of macrophage phagocytosis can aid in resolving inflammation but success is critically dependent on the rate of neutrophil apoptosis. Indeed our model predicts that an effective treatment protocol would take a dual approach, targeting macrophage phagocytosis alongside neutrophil apoptosis.
  // This model is hosted on BioModels Database and identified by: BIOMD0000000616.
  // To cite BioModels Database, please use: BioModels Database: An enhanced, curated and annotated resource for published quantitative kinetic models.
  // To the extent possible under law, all copyright and related or neighbouring rights to this encoded model have been dedicated to the public domain worldwide. Please refer to CC0 Public Domain Dedication for more information.
  // hasProperty DOID:+2914
  // hasTaxon taxonomy:9606
  // biomodels.db:MODEL1608160000
  // biomodels.db:BIOMD0000000616
  // isVersionOf GO:0006954
  // hasProperty DOID:+2914
  // model units - substance: substance, time: time, volume: volume, area: area, length: length, extent: substance

  // Compartments:
  compartment default_compartment = 1 volume; default_compartment is "Soft_Tissue";

  // Species:
  // Active neutrophils
  species n in default_compartment = 0;  // isVersionOf BTO:0000130
  // Pro-inﬂammatory mediators
  species c in default_compartment = 0;  // isVersionOf uniprot:P10145
  // Apoptotic neutrophils
  species a in default_compartment = 0;  // isVersionOf BTO:0000130
  // Macrophages
  species m in default_compartment = 0;  // isVersionOf BTO:0000801
  species $aSc in default_compartment;
  species $mSc in default_compartment;
  species $nSc in default_compartment;

  // Parameters:
  // Dimensionless constant nu.tilde (ν˜) relate to rate of neutrophil apoptosis
  vt = 57.88557;
  // Dimensionless constant gamma.a.tilde (γa˜) related to rate of secondary necrosis
  Gat = 6.21221;
  // Dimensionless constant theta.tilde (φ˜) related to rate at which macrophages engulf neutrophils
  Tt = 0.0008895485;
  // Dimensionless constant gamma.m.tilde (γm˜) related to rate that macrophages leave the tissue
  Gmt = 2.746441;
  // Dimensionless constant alpha tilde(α˜) related to rate of production of mediator (c) from initial damage
  alt = 695.4043;
  // Dimensionless constant beta.a.tilde (βa˜) related to saturation constant
  Bat = 2.493803e-5;
  stimtime = 3.284383;
  scale = 0.7977154;

  // Assignment rules:
  mSc := m*scale;
  aSc := a*scale;
  nSc := n*scale;

  // Reactions:
  R1: -> n; default_compartment*Function_for_R1(c, default_compartment);  // modifiers: c
  R2: n -> ; default_compartment*Function_for_R2_1(default_compartment, n, vt);
  R3: -> a; default_compartment*Function_for_R3_1(default_compartment, n, vt);  // modifiers: n
  R4: a -> ; default_compartment*Function_for_R4_1(Gat, a, default_compartment);
  R5: a -> ; default_compartment*Function_for_R5_1(Tt, a, default_compartment, m);  // modifiers: m
  R6: -> m; default_compartment*Function_for_R6(c, default_compartment);  // modifiers: c
  R7: m -> ; default_compartment*Function_for_R7_1(Gmt, default_compartment, m);
  R8: -> c; default_compartment*Function_R8_revised(alt, time, stimtime, default_compartment);
  R9: -> c; default_compartment*Function_for_R9_1(Bat, Gat, a, default_compartment);  // modifiers: a
  R10: c -> ; default_compartment*Function_for_R10(c, default_compartment);

  // Unit definitions:
  unit length = metre;
  unit area = metre^2;
  unit volume = litre;
  unit time = second;
  unit substance = mole;
end
