// SBML level 2 version 4
// dcterms:bibliographicCitation: http://identifiers.org/pubmed/14551908

function Constant_flux__irreversible_0(v)
  v;
end
Constant_flux__irreversible_0 is "Constant flux (irreversible)";

function function_for_v1_1(Dsh_i, W, k1)
  k1*Dsh_i*W;
end

function function_for_v3_1(APC_axin_GSK3, Dsh_a, k3)
  k3*Dsh_a*APC_axin_GSK3;
end

model Lee2003___Roles_of_APC_and_Axin_in_Wnt_Pathway__without_regulatory_loop()
  // Lee2003 - Roles of APC and Axin in Wnt Pathway (without regulatory loop)
  // This model is described in the article:
  // The roles of APC and Axin derived from experimental and theoretical analysis of the Wnt pathway.
  // Lee E, Salic A, Krüger R, Heinrich R, Kirschner MW.
  // PLoS Biol. 2003 Oct; 1(1): E10
  // Abstract:
  // Wnt signaling plays an important role in both oncogenesis and development. Activation of the Wnt pathway results in stabilization of the transcriptional coactivator beta-catenin. Recent studies have demonstrated that axin, which coordinates beta-catenin degradation, is itself degraded. Although the key molecules required for transducing a Wnt signal have been identified, a quantitative understanding of this pathway has been lacking. We have developed a mathematical model for the canonical Wnt pathway that describes the interactions among the core components: Wnt, Frizzled, Dishevelled, GSK3beta, APC, axin, beta-catenin, and TCF. Using a system of differential equations, the model incorporates the kinetics of protein-protein interactions, protein synthesis/degradation, and phosphorylation/dephosphorylation. We initially defined a reference state of kinetic, thermodynamic, and flux data from experiments using Xenopus extracts. Predictions based on the analysis of the reference state were used iteratively to develop a more refined model from which we analyzed the effects of prolonged and transient Wnt stimulation on beta-catenin and axin turnover. We predict several unusual features of the Wnt pathway, some of which we tested experimentally. An insight from our model, which we confirmed experimentally, is that the two scaffold proteins axin and APC promote the formation of degradation complexes in very different ways. We can also explain the importance of axin degradation in amplifying and sharpening the Wnt signal, and we show that the dependence of axin degradation on APC is an essential part of an unappreciated regulatory loop that prevents the accumulation of beta-catenin at decreased APC concentrations. By applying control analysis to our mathematical model, we demonstrate the modular design, sensitivity, and robustness of the Wnt pathway and derive an explicit expression for tumor suppression and oncogenicity.
  // This model is hosted on BioModels Database and identified by: BIOMD0000000658.
  // To cite BioModels Database, please use: Chelliah V et al. BioModels: ten-year anniversary. Nucl. Acids Res. 2015, 43(Database issue):D542-8.
  // To the extent possible under law, all copyright and related or neighbouring rights to this encoded model have been dedicated to the public domain worldwide. Please refer to CC0 Public Domain Dedication for more information.
  // hasProperty mamo:MAMO_0000046
  // hasProperty kegg.pathway:xla04310
  // hasTaxon taxonomy:262014
  // biomodels.db:MODEL1708310000
  // biomodels.db:BIOMD0000000658
  // hasProperty mamo:MAMO_0000046

  // Compartments:
  compartment Cytoplasm = 1;  // FMA:66835
  compartment Nucleus = 1;  // isVersionOf GO:0005634

  // Species:
  species Dsh_i in Cytoplasm = Dsh0 - Dsh_a;  // isHomologTo uniprot:P51142
  species Dsh_a in Cytoplasm = 0;  // isHomologTo uniprot:P51142
  species APC__axin__GSK3 in Cytoplasm = 0.00966; APC__axin__GSK3 is "APC*/axin*/GSK3";  // hasPart uniprot:Q9YGY0; hasPart uniprot:P70039; hasPart uniprot:Q91757
  species APC_axin_GSK3 in Cytoplasm = 0.00483; APC_axin_GSK3 is "APC/axin/GSK3";  // hasPart uniprot:Q91757; hasPart uniprot:Q9YGY0; hasPart uniprot:P70039
  species GSK3 in Cytoplasm = 50;  // isVersionOf uniprot:Q91757
  species APC_axin in Cytoplasm = 0.00098065; APC_axin is "APC/axin";  // hasPart uniprot:P70039; hasPart uniprot:Q9YGY0
  species APC in Cytoplasm = 98;  // isVersionOf uniprot:P70039
  species B_catenin_APC__axin__GSK3 in Cytoplasm = 0.00202; B_catenin_APC__axin__GSK3 is "B_catenin/APC*/axin*/GSK3";  // hasPart uniprot:P70039; hasPart uniprot:Q91757; hasPart uniprot:Q9YGY0; hasPart uniprot:P26233
  species B_catenin__APC__axin__GSK3 in Cytoplasm = 0.00202; B_catenin__APC__axin__GSK3 is "B_catenin*/APC*/axin*/GSK3";  // hasPart uniprot:Q91757; hasPart uniprot:P70039; hasPart uniprot:Q9YGY0; hasPart uniprot:P26233
  species B_catenin in Cytoplasm = 1; B_catenin is "B_catenin*";  // isVersionOf uniprot:P26233
  species B_catenin_0 in Nucleus = 25.1;  // isVersionOf uniprot:P26233
  species Axin in Cytoplasm = 0.000493;  // isVersionOf uniprot:Q9YGY0
  species TCF in Nucleus = 8.17;  // CHEBI:30956
  species B_catenin_TCF in Nucleus = 6.83; B_catenin_TCF is "B_catenin/TCF";  // hasPart CHEBI:30956; hasPart uniprot:P26233
  species B_catenin_APC in Cytoplasm = 2.05; B_catenin_APC is "B_catenin/APC";  // hasPart uniprot:P70039; hasPart uniprot:P26233
  species $W in Cytoplasm;
  species $B_catenin_tot in Cytoplasm;
  species $Axin_tot in Cytoplasm;

  // Parameters:
  k1 = 0.1902963;
  k2 = 0.01829597;
  k3 = 0.04394515;
  k4 = 0.3073606;
  k5 = 0.3902524;
  k6 = 0.03147939;
  k_6 = 0.4527698;
  k7 = 106.4524;
  k8 = 30.37181;
  k9 = 564.2886;
  k10 = 69.44369;
  k11 = 0.7618924;
  k12 = 0.2473811;
  k13 = 0.000568062;
  k14 = 0.0001083553;
  k15 = 0.03262699;
  k16 = 27.96698;
  k17 = 159.6626;
  K_7 = 165.0207;
  K_8 = 138.8039;
  K_16 = 17.05983;
  K_17 = 94.89742;
  lambda = 0.05;
  t0 = 0;
  Dsh0 = 100;

  // Assignment rules:
  Axin_tot := APC_axin_GSK3 + APC__axin__GSK3 + APC_axin + Axin + B_catenin_APC__axin__GSK3 + B_catenin__APC__axin__GSK3;
  B_catenin_tot := B_catenin_APC__axin__GSK3 + B_catenin__APC__axin__GSK3 + B_catenin_APC + B_catenin_0 + B_catenin + B_catenin_TCF;
  W := piecewise(0, time < t0, exp(-1*lambda*(time - t0)));
  k_7 := k7*K_7;
  k_8 := k8*K_8;
  k_16 := k16*K_16;
  k_17 := k17*K_17;
  Total_Axin := APC__axin__GSK3 + APC_axin_GSK3 + APC_axin + B_catenin_APC__axin__GSK3 + B_catenin__APC__axin__GSK3 + Axin;
  Total_B_Catenin := B_catenin_APC__axin__GSK3 + B_catenin__APC__axin__GSK3 + B_catenin + B_catenin_0 + B_catenin_TCF + B_catenin_APC;

  // Reactions:
  v1: Dsh_i => Dsh_a; Cytoplasm*function_for_v1_1(Dsh_i, W, k1);  // modifiers: W
  v2: Dsh_a => Dsh_i; Cytoplasm*k2*Dsh_a;
  v3: APC_axin_GSK3 => GSK3 + APC_axin; Cytoplasm*function_for_v3_1(APC_axin_GSK3, Dsh_a, k3);  // modifiers: Dsh_a
  v4: APC_axin_GSK3 => APC__axin__GSK3; Cytoplasm*k4*APC_axin_GSK3;  // isVersionOf GO:0016310
  v5: APC__axin__GSK3 => APC_axin_GSK3; Cytoplasm*k5*APC__axin__GSK3;  // isVersionOf GO:0016311
  v6: GSK3 + APC_axin -> APC_axin_GSK3; Cytoplasm*(k6*GSK3*APC_axin - k_6*APC_axin_GSK3);  // isVersionOf OBI:0001588
  v7: APC + Axin -> APC_axin; Cytoplasm*(k7*APC*Axin - k_7*APC_axin);  // isVersionOf OBI:0001588
  v8: APC__axin__GSK3 + B_catenin_0 -> B_catenin_APC__axin__GSK3; k8*APC__axin__GSK3*B_catenin_0 - k_8*B_catenin_APC__axin__GSK3;  // isVersionOf OBI:0001588
  v9: B_catenin_APC__axin__GSK3 => B_catenin__APC__axin__GSK3; Cytoplasm*k9*B_catenin_APC__axin__GSK3;  // isVersionOf GO:0016310
  v10: B_catenin__APC__axin__GSK3 => B_catenin + APC__axin__GSK3; Cytoplasm*k10*B_catenin__APC__axin__GSK3;
  v11: B_catenin => ; Cytoplasm*k11*B_catenin;
  v12: => B_catenin_0; Nucleus*Constant_flux__irreversible_0(k12);  // isVersionOf OBI:0600040
  v13: B_catenin_0 => ; Nucleus*k13*B_catenin_0;
  v14: => Axin; Cytoplasm*Constant_flux__irreversible_0(k14);  // isVersionOf OBI:0600040
  v15: Axin => ; Cytoplasm*k15*Axin;
  v16: B_catenin_0 + TCF -> B_catenin_TCF; Nucleus*(k16*B_catenin_0*TCF - k_16*B_catenin_TCF);  // isVersionOf OBI:0001588
  v17: APC + B_catenin_0 -> B_catenin_APC; k17*APC*B_catenin_0 - k_17*B_catenin_APC;  // isVersionOf OBI:0001588

  // Unit definitions:
  unit volume = 1e-3 litre;
  unit time = 60 second;
  unit substance = 1e-6 mole;
end
