// SBML level 2 version 4

function species_hill(rb_ji, rm_ji, xi, nji, theta_ji)
  rb_ji + (rm_ji - rb_ji)*(xi^nji/(xi^nji + theta_ji^nji));
end

function rate_x5(k3, x4, k4, x5)
  k3*x4 - k4*x5;
end

function drug_hill(rm, rb, wi, n, theta)
  rm - (rm - rb)*(wi^n/(wi^n + theta^n));
end

function rate_x1(x1, Cnu, rm, rb, w1, n, theta, w2, rb12, rm12, x2, n12, theta12, rb13, rm13, x3, n13, theta13)
  (1 - x1)*Cnu*drug_hill(rm, rb, w1, n, theta)*drug_hill(rm, rb, w2, n, theta) - x1*species_hill(rb12, rm12, x2, n12, theta12)*species_hill(rb13, rm13, x3, n13, theta13);
end

function rate_x4(x4, rb42, rm42, x2, n42, theta42, rm, rb, w2, n, theta, w6, k2)
  (1 - x4)*species_hill(rb42, rm42, x2, n42, theta42)*drug_hill(rm, rb, w2, n, theta)*drug_hill(rm, rb, w6, n, theta) - k2*x4;
end

function rate_x3(x3, k1, rm, rb, w4, n, theta, Cen, x2, w5)
  (1 - x3)*k1*drug_hill(rm, rb, w4, n, theta) - Cen*x2*x3*drug_hill(rm, rb, w5, n, theta);
end

function rate_x2(x2, rb23, rm23, x3, n23, theta23, rm, rb, w3, n, theta, rb21, rm21, x1, n21, theta21)
  (1 - x2)*species_hill(rb23, rm23, x3, n23, theta23)*drug_hill(rm, rb, w3, n, theta) - x2*species_hill(rb21, rm21, x1, n21, theta21);
end

model New_Model()

  // Compartments:
  compartment compartment = 1;

  // Species:
  species x2_ULK1 in compartment = 0.831;
  species x3_AMPK in compartment = 0.546;
  species x4_VPS34 in compartment = 0.947;
  species x5_AV in compartment = 37.9;
  species x1_MTORC1 in compartment = 0.0028;
  species $total_drug in compartment;

  // Parameters:
  CNu = 0.1;
  CEn = 0.1;
  w1 = 4.447194e-5;
  w2 = 0.883822;
  w3 = 1.381708e-5;
  w4 = 5.903111e-5;
  w5 = 5.946416e-6;
  w6 = 0.9079265;
  rb12 = 0;
  rm12 = 10;
  theta12 = 0.3;
  n12 = 4;
  rb13 = 0;
  rm13 = 10;
  theta13 = 0.6;
  n13 = 6;
  rb23 = 0;
  rm23 = 6;
  theta23 = 1;
  n23 = 4;
  rb21 = 0.1;
  rm21 = 6;
  theta21 = 0.6;
  n21 = 4;
  rb42 = 0.1;
  rm42 = 6;
  theta42 = 0.5;
  n42 = 4;
  k1 = 0.1;
  k2 = 0.3;
  k3 = 4;
  k4 = 0.1;
  rb = 0;
  rm = 1;
  theta = 0.5;
  n = 2;

  // Assignment rules:
  total_drug := w1 + w2 + w3 + w4 + w5 + w6;

  // Reactions:
  mTORC1: -> x1_MTORC1; compartment*rate_x1(x1_MTORC1, CNu, rm, rb, w1, n, theta, w2, rb12, rm12, x2_ULK1, n12, theta12, rb13, rm13, x3_AMPK, n13, theta13);  // modifiers: x2_ULK1, x3_AMPK
  ULK1: -> x2_ULK1; compartment*rate_x2(x2_ULK1, rb23, rm23, x3_AMPK, n23, theta23, rm, rb, w3, n, theta, rb21, rm21, x1_MTORC1, n21, theta21);  // modifiers: x3_AMPK, x1_MTORC1
  AMPK: -> x3_AMPK; compartment*rate_x3(x3_AMPK, k1, rm, rb, w4, n, theta, CEn, x2_ULK1, w5);  // modifiers: x2_ULK1
  VPS34: -> x4_VPS34; compartment*rate_x4(x4_VPS34, rb42, rm42, x2_ULK1, n42, theta42, rm, rb, w2, n, theta, w6, k2);  // modifiers: x2_ULK1
  AV: -> x5_AV; compartment*rate_x5(k3, x4_VPS34, k4, x5_AV);  // modifiers: x4_VPS34

  // Unit definitions:
  unit volume = 1e-3 litre;
  unit substance = 1e-3 mole;
end
