// SBML level 2 version 4

model MODEL1506070001()
  // Romano-Nguyen2014 - MST2 and Raf1 Crosstalk
  // Originally created by libAntimony v1.3 (using libSBML 4.1.0-b2)
  // biomodels.db:MODEL1506070001

  // Compartments:
  compartment default_compartment = 1;

  // Species:
  species pRaf_1i in default_compartment = 1644.274;
  species Raf_1 in default_compartment = 0;
  species LATS1a in default_compartment = 0;
  species Raf_1a in default_compartment = 0;
  species ppERK in default_compartment = 0;
  species pMST2i in default_compartment = 0;
  species pMi_pRi in default_compartment = 0;
  species MST2 in default_compartment = 572.8313;
  species M_pRi in default_compartment = 0;
  species MST2a in default_compartment = 0;
  species F1A in default_compartment = 127.0654;
  species Ma_F1A in default_compartment = 0;
  species M_F1A in default_compartment = 0;
  species LATS1 in default_compartment = 479.9064;
  species MEK in default_compartment = 1600;
  species Ra_Mk in default_compartment = 0;
  species pMEK in default_compartment = 0;
  species ppMEK in default_compartment = 0;
  species Ra_pMk in default_compartment = 0;
  species ERK in default_compartment = 3000;
  species pERK in default_compartment = 0;

  // Parameters:
  k1 = 0.3344466;
  RasGTP = 9.559874;
  Km1 = 0.1146309;
  k2a = 0.000881001;
  Km2a = 10.19927;
  k2b = 0.007487189;
  Kin = 0.3682625;
  Km2b = 14.22906;
  V3 = 0.9085431;
  Km3 = 0.6588722;
  Fa = 0.2037174;
  Ka = 7.675324;
  V4 = 2.756281;
  Km4 = 0.2930299;
  k5f = 0.00470026;
  k5r = 0.04470386;
  k6f = 0.001600732;
  k6r = 0.0004644515;
  k7 = 0.0003303112;
  AKTa = 33.95871;
  Kact = 30.84407;
  Km7 = 42.78929;
  k8 = 0.0176827;
  PP2A = 21.34776;
  Km8 = 1.340801;
  k9 = 0.03617452;
  k10 = 0.4219814;
  Km10 = 28.74013;
  k11f = 0.004170775;
  k11r = 0.0205501;
  k12f = 0.001030387;
  k12r = 0.0003336709;
  V13 = 19.73758;
  Km13 = 11.77721;
  k14a = 0.0001456952;
  Km14a = 32.79857;
  k14b = 0.01215351;
  Km14b = 62.62336;
  V15 = 0.2864539;
  Km15 = 1.917038;
  k16af = 0.1475841;
  k16ar = 0.0006679978;
  k16b = 1.115247;
  V17 = 2.01398;
  Km17 = 6.385867;
  Km19 = 14.47592;
  k18af = 0.5128919;
  k18ar = 0.00292056;
  k18b = 0.09334021;
  V19 = 7.551195;
  k20 = 0.4363418;
  Km20 = 5.812459;
  Km22 = 6.574317;
  V21 = 3.159806;
  Km21 = 2.322186;
  Km23 = 175.6228;
  Ki = 7.727543;
  k22 = 4.691657;
  V23 = 19.82292;
  pMST2 = 0;

  // Reactions:
  v1: pRaf_1i -> Raf_1; k1*RasGTP*pRaf_1i/(Km1 + pRaf_1i);
  v2: Raf_1 -> pRaf_1i; k2a*LATS1a*Raf_1/(Km2a + Raf_1) + k2b*Kin*Raf_1/(Km2b + Raf_1);  // modifiers: LATS1a
  v3: Raf_1 -> Raf_1a; V3*Raf_1/(Km3 + Raf_1)*((1 + Fa*(ppERK/Ka))/(1 + ppERK/Ka));  // modifiers: ppERK
  v4: Raf_1a -> Raf_1; V4*Raf_1a/(Km4 + Raf_1a);
  v5a: pMST2i + pRaf_1i -> pMi_pRi; k5f*pMST2i*pRaf_1i;
  v5b: pMi_pRi -> pMST2i + pRaf_1i; k5r*pMi_pRi;
  v6a: MST2 + pRaf_1i -> M_pRi; k6f*MST2*pRaf_1i;
  v6b: M_pRi -> MST2 + pRaf_1i; k6r*M_pRi;
  v7: MST2 -> pMST2i; k7*AKTa*MST2*(1 + Kact*RasGTP)/(Km7 + MST2);
  v8: pMST2i -> MST2; k8*PP2A*pMST2i/(Km8 + pMST2i);
  v9: MST2 + MST2 -> MST2a + MST2a; k9*MST2*MST2;
  v10: MST2a -> MST2; k10*PP2A*MST2a/(Km10 + MST2a);
  v11a: MST2a + F1A -> Ma_F1A; k11f*MST2a*F1A;
  v11b: Ma_F1A -> MST2a + F1A; k11r*Ma_F1A;
  v12a: MST2 + F1A -> M_F1A; k12f*MST2*F1A;
  v12b: M_F1A -> MST2 + F1A; k12r*M_F1A;
  v13: M_F1A -> Ma_F1A; V13*M_F1A/(Km13 + M_F1A);
  v14: LATS1 -> LATS1a; k14a*MST2a*LATS1/(Km14a + LATS1) + k14b*Ma_F1A*LATS1/(Km14b + LATS1);  // modifiers: MST2a, Ma_F1A
  v15: LATS1a -> LATS1; V15*LATS1a/(Km15 + LATS1a);
  v16a: Raf_1a + MEK -> Ra_Mk; k16af*Raf_1a*MEK;
  v16aa: Ra_Mk -> Raf_1a + MEK; k16ar*Ra_Mk;
  v16b: Ra_Mk -> pMEK + Raf_1a; k16b*Ra_Mk;
  v17: pMEK -> MEK; V17*pMEK/(Km17 + pMEK + ppMEK*(Km17/Km19));  // modifiers: ppMEK
  v18a: Raf_1a + pMEK -> Ra_pMk; k18af*Raf_1a*pMEK;
  v18aa: Ra_pMk -> Raf_1a + pMEK; k18ar*Ra_pMk;
  v18b: Ra_pMk -> ppMEK + Raf_1a; k18b*Ra_pMk;
  v19: ppMEK -> pMEK; V19*ppMEK/(Km19 + ppMEK + pMEK*(Km19/Km17));
  v20: ERK -> pERK; k20*ppMEK*ERK/(Km20 + ERK + pERK*(Km20/Km22));  // modifiers: ppMEK
  v21: pERK -> ERK; V21*pERK/(Km21 + pERK + ppERK*(Km21/Km23) + ERK*(Km21/Ki));  // modifiers: ppERK
  v22: pERK -> ppERK; k22*ppMEK*pERK/(Km22 + pERK + ERK*(Km22/Km20));  // modifiers: ppMEK, ERK
  v23: ppERK -> pERK; V23*ppERK/(Km23 + ppERK + pERK*(Km23/Km21) + ERK*(Km23/Ki));  // modifiers: ERK
end
